x := transpose([2100, 2100, 3000, 3000, 4000, 4000, 5000, 5000, 6000, 5900, 2400, 2600, 3000, 3000, 4000, 4000, 5000, 5000, 6000, 6000])
y := transpose([-8, 53, -13, 56, -7, 34, -15, 88, 4, 103, -306, -106, -307, -97, -253, -90, -308, -90, -308, -81])
z := transpose([79.91, 79.66, 75.09, 74.95, 69.20, 69.04, 62.03, 61.46, 47.32, 47.78, 79.88, 79.66, 77.02, 77.72, 71.13, 71.82, 64.40, 64.85, 54.58, 52.40])
a0 := 0
a1 := 0
a2 := 0
a3 := 0
a4 := 0
a5 := 0
a6 := 0
a7 := 0
a8 := 0
a9 := 0
a10 := 0
a11 := 0
a12 := 0
a13 := 0
a14 := 0
Given
z == a0 + a1*x + a2*y + a3*x^2 + a4*y^2 + a5*x^3 + a6*y^3 + a7*x^4 + a8*y^4 + a9*x^5 + a10*y^5 + a11*x^6 + a12*y^6 + a13*x^7 + a14*y^7
a := Minerr(a0, a1, a2, a3, a4, a5, a6, a7, a8, a9, a10, a11, a12, a13, a14)
a = [-6702.55; 13.1901; -0.0701275; -0.0106447; 0.000810678; 4.6179e-6; 2.166e-5; -1.16272e-9; 1.14005e-8; 0; -1.77322e-9; 0; 0; 0; 0]
p := a[0] + a[1]*x + a[2]*y + a[3]*x^2 + a[4]*y^2 + a[5]*x^3 + a[6]*y^3 + a[7]*x^4 + a[8]*y^4 + a[9]*x^5 + a[10]*y^5 + a[11]*x^6 + a[12]*y^6 + a[13]*x^7 + a[14]*y^7
transpose(p) = [79.6401, 79.9303, 74.8868, 75.102, 69.3613, 68.1604, 61.7044, 61.4216, 48.4219, 47.7801, 79.8783, 79.662, 77.1266, 77.6639, 71.1241, 72.5443, 65.3662, 64.2477, 53.5128, 52.3653]
σ := sqrt(((z[0] - p[0])^2 + (z[1] - p[1])^2 + (z[2] - p[2])^2 + (z[3] - p[3])^2 + (z[4] - p[4])^2 + (z[5] - p[5])^2 + (z[6] - p[6])^2 + (z[7] - p[7])^2 + (z[8] - p[8])^2 + (z[9] - p[9])^2 + (z[10] - p[10])^2 + (z[11] - p[11])^2 + (z[12] - p[12])^2 + (z[13] - p[13])^2 + (z[14] - p[14])^2 + (z[15] - p[15])^2 + (z[16] - p[16])^2 + (z[17] - p[17])^2 + (z[18] - p[18])^2 + (z[19] - p[19])^2)/20)
σ = 0.515124
